# OpenSim document version 40500
MarkerSet:
  Marker RSHO: torso (-0.003 0.425 0.13)
  Marker LSHO: torso (-0.004227289 0.4239734 -0.1309956)
  Marker C7: torso (-0.085 0.435 0.00165426)
  Marker STRN: torso (0.1058247 0.2427958 -0.002964972)
  Marker T10: torso (-0.1009549 0.2968683 0.0002406089)
  Marker RUPA: humerus_r (-0.003855229 -0.06527744 0.01951857)
  Marker RELB: humerus_r (0.015 -0.28 0.04)
  Marker RFRM: ulna_r (-0.02193576 -0.1118719 -0.007165362)
  Marker RWRA: radius_r (0.0005 -0.225 0.05)
  Marker LUPA: humerus_l (0.001741372 -0.0655633 -0.02342839)
  Marker LELB: humerus_l (0.015 -0.28 -0.04)
  Marker LFRM: ulna_l (-0.03142784 -0.1110489 0.006390055)
  Marker LWRA: radius_l (0.0005 -0.225 -0.05)
  Marker RASI: pelvis (0.00953047 0.0180816 0.128464)
  Marker LASI: pelvis (0.00953047 0.0180816 -0.128464)
  Marker RPSI: pelvis (-0.155 0.035 0.045)
  Marker LPSI: pelvis (-0.155 0.035 -0.045)
  Marker RTHI: femur_r (0.0322877 -0.1834343 0.06967795)
  Marker RKNE: femur_r (0 -0.404 0.05)
  Marker RTIB: tibia_r (0.01247958 -0.2976742 0.04574949)
  Marker RANK: tibia_r (-0.005 -0.3888 0.053)
  Marker RHEE: calcn_r (-0.025 0.02 -0.005)
  Marker RTOE: calcn_r (0.1986915 0.03122964 0.0009034154)
  Marker LTHI: femur_l (0.009372213 -0.2735176 -0.06142012)
  Marker LKNE: femur_l (0 -0.404 -0.05)
  Marker LTIB: tibia_l (0.01584636 -0.2475017 -0.03601984)
  Marker LANK: tibia_l (-0.005 -0.3888 -0.053)
  Marker LHEE: calcn_l (-0.025 0.02 0.005)
  Marker LTOE: calcn_l (0.2116317 0.03587006 -4.296708e-5)
  Marker CLAV: torso (0.04788471 0.3612679 0.000932977)
  Marker RBAK: torso (-0.1037769 0.3296966 0.06520514)
  Marker RWRB: ulna_r (-0.01370263 -0.2421814 0.006812543)
  Marker LWRB: ulna_l (-0.02090886 -0.2430682 -0.004563075)
